*Heading
** Job name: 125_Cubes_UMAT Model name: Cube
** Generated by: Python
*Preprint, echo=NO, model=NO, history=NO, contact=NO
**
** PARTS
**
*Part, name=CUBE
*Node
      1,    0.5,    0.5,    0.5
      2,    0.5,    0.3,    0.5
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*Element, type=C3D8
1, 185, 186, 192, 191, 149, 150, 156, 155
2, 191, 192, 198, 197, 155, 156, 162, 161
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*Nset, nset=NODESET, generate
 1,  216,  1
*Elset, elset=NODESET
1, 2, 3, 4, 5, 6
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** Section: Section-1-NODESET
*Solid Section, elset=NODESET, material=Elastic_UMAT
,
*End Part
**
**
** ASSEMBLY
**
*Assembly, name=Assembly
**
*Instance, name=CUBEINSTANCE, part=CUBE
*End Instance
**
*Nset, nset=BOTTOMNODES, instance=CUBEINSTANCE
 31,  32,  33,  34,  35,  36
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*Elset, elset=BOTTOMNODES, instance=CUBEINSTANCE
  5,  10,  15,  20,  25,  30
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*Nset, nset=TOPNODES, instance=CUBEINSTANCE
 6,  42,  78, 114, 150, 186
*Elset, elset=TOPNODES, instance=CUBEINSTANCE
  1,  26,  51,  76, 101,
*End Assembly
**
** MATERIALS
**
*Material, name=Elastic_UMAT
*User Material, constants=2
10000.0, 0.3
*DEPVAR
9
1, F11,
2, F12,
3, F13,
4, F21,
5, F22,
6, F23,
7, F31,
8, F32,
9, F33
** ----------------------------------------------------------------
**
** STEP: Compression
**
*Step, name=Compression, nlgeom=YES
Static compression
*Static
1., 1., 1e-05, 1.
**
** BOUNDARY CONDITIONS
**
** Name: Disp-BC-1 Type: Displacement/Rotation
*Boundary
TOPNODES, 3, 3, -0.1
** Name: Disp-BC-2 Type: Displacement/Rotation
*Boundary
BOTTOMNODES, 3, 3
**
** OUTPUT REQUESTS
**
*Restart, write, frequency=0
**
** FIELD OUTPUT: F-Output-1
**
*Output, field
*Element Output
SDV1,
SDV2,
SDV3,
SDV4,
SDV5,
SDV6,
SDV7,
SDV8,
SDV9,
*Node Output
U,
**El Print
**DG,
*Output, history, frequency=0
*End Step
